# Udregninger til Step down converter
# N er vindinger på spolen - V.out er sat til 5V - V.f er spændingsfald over diode -
N := 6
V_out := 5 V
V_F := 0.3 V
N*(V_out + V_F)/(100*10^-6*A) = 318000 Ω
# Udregninger til cut off frekvenser
500 Hz == 1/(2*π*100*nF*R) solve, R → 1/(100000*π*Hz*nF) = 3183.1 Ω
# Vælges til 3.3 kΩ, grundedt e24 række og derved fremkommer
1/(2*π*100*nF*3.3*kΩ) = 482.288 1/s
